if "$(is_defined(fix,avp))" then "unfix avp"
reset_timestep 0

# Choose potential
pair_style      m3gnet/gpu ../../potentials/M3GNET
pair_coeff      * * M3GNet-MP-2021.2.8-DIRECT-PES Si H C O

# Setup neighbor style
neighbor 1.0 nsq
neigh_modify once no every 1 delay 0 check yes

# Setup output

fix avp all ave/time  ${nevery} ${nrepeat} ${nfreq} c_thermo_press mode vector
thermo		${nthermo}
thermo_style custom step temp pe press f_avp[1] f_avp[2] f_avp[3] f_avp[4] f_avp[5] f_avp[6]
thermo_modify norm no

# Setup MD
timestep ${timestep}
fix 4 all nve
if "${thermostat} == 1" then &
	"fix 5 all langevin ${temp} ${temp} ${tdamp} ${seed}"
